// Standard IEEE 14-Bus Transmission System Test Case
/*
Network data extracted from MatPower Version 7.1.
All per unit values converted to actual values with the formula Z_pu = Z_Ohms/Z_base
where Z_base = (KV_LL)^2/MVA_base
MVA_base = 100MVA
Bus Voltage KV_LL = 1kV (Since VBus Voltages are not mentioned in Common Data Format, Assumed KV_LL = 1kV based on ETAP IEEE14Bus Model)

Susceptance B (in microS) = (B_pu x 10^6)/Z_base
*/
Compile IEEE14BusMaster.dss

! The compile builds the circuit model and sets the voltage bases

! sometimes this model needs more than the default 15 iterations
Set maxiterations=200

! Converge the power flow properly. With the four PV generators regulating,
! the default tolerance (1e-4) stops a solve up to 1.7 measurement sigmas
! (0.017 pu) short of the converged solution and the operating-point and
! load-scaling code paths land on different sides of it (1.5 sigma apart on
! bus-2/3 injections). 1e-8 brings both below 1e-3 sigma at about 50
! iterations (2026-09-23).
Set tolerance=1e-8

! This command solves the base case power flow
Solve


! show voltage    ! sequence voltage magnitudes
! show voltage  LN Nodes   ! Detailed
! show power   ! sequence powers
! show power MVA elem   ! show powers in MVA, element by element
